// COMSOL Multiphysics 6.0.0.318 model "optical force p-o-c.mph"
// Outline of the model tree

Parameters
  wl = 900[nm]
  r_p = wl/20  // Particle radius
  r_a = wl*1.09  // Air sphere radius
  r_pml = wl*0.1  // PML radius
  r_I = r_p*1.5  // Integration sphere radius
  M = 0  // Azimuthal number
  M_from = -1
  M_to = 1

Variables
  var4 "Forces"
    p_x = real(epsilon0_const/4*sum((withsol('sol1',ewfd.Er,setval(M,n))*conj(withsol('sol1',ewfd.Er,setval(M,n+1)))-withsol('sol1',ewfd.Ephi,setval(M,n))*conj(withsol('sol1',ewfd.Ephi,setval(M,n+1)))-withsol('sol1',ewfd.Ez,setval(M,n))*conj(withsol('sol1',ewfd.Ez,setval(M,n+1)))-i*withsol('sol1',ewfd.Er,setval(M,n))*conj(withsol('sol1',ewfd.Ephi,setval(M,n+1)))+i*withsol('sol1',ewfd.Er,setval(M,n+1))*conj(withsol('sol1',ewfd.Ephi,setval(M,n))))*nr+(withsol('sol1',ewfd.Er,setval(M,n))*conj(withsol('sol1',ewfd.Ez,setval(M,n+1)))+withsol('sol1',ewfd.Er,setval(M,n+1))*conj(withsol('sol1',ewfd.Ez,setval(M,n)))-i*withsol('sol1',ewfd.Ephi,setval(M,n))*conj(withsol('sol1',ewfd.Ez,setval(M,n+1)))+i*withsol('sol1',ewfd.Ephi,setval(M,n+1))*conj(withsol('sol1',ewfd.Ez,setval(M,n))))*nz,n,M_from,M_to-1)+mu0_const/4*sum((withsol('sol1',ewfd.Hr,setval(M,n))*conj(withsol('sol1',ewfd.Hr,setval(M,n+1)))-withsol('sol1',ewfd.Hphi,setval(M,n))*conj(withsol('sol1',ewfd.Hphi,setval(M,n+1)))-withsol('sol1',ewfd.Hz,setval(M,n))*conj(withsol('sol1',ewfd.Hz,setval(M,n+1)))-i*withsol('sol1',ewfd.Hr,setval(M,n))*conj(withsol('sol1',ewfd.Hphi,setval(M,n+1)))+i*withsol('sol1',ewfd.Hr,setval(M,n+1))*conj(withsol('sol1',ewfd.Hphi,setval(M,n))))*nr+(withsol('sol1',ewfd.Hr,setval(M,n))*conj(withsol('sol1',ewfd.Hz,setval(M,n+1)))+withsol('sol1',ewfd.Hr,setval(M,n+1))*conj(withsol('sol1',ewfd.Hz,setval(M,n)))-i*withsol('sol1',ewfd.Hphi,setval(M,n))*conj(withsol('sol1',ewfd.Hz,setval(M,n+1)))+i*withsol('sol1',ewfd.Hphi,setval(M,n+1))*conj(withsol('sol1',ewfd.Hz,setval(M,n))))*nz,n,M_from,M_to-1))  // Pressure x
    p_y = real(epsilon0_const/4*sum((-i*withsol('sol1',ewfd.Er,setval(M,n))*conj(withsol('sol1',ewfd.Er,setval(M,n+1)))+i*withsol('sol1',ewfd.Ephi,setval(M,n))*conj(withsol('sol1',ewfd.Ephi,setval(M,n+1)))+i*withsol('sol1',ewfd.Ez,setval(M,n))*conj(withsol('sol1',ewfd.Ez,setval(M,n+1)))+withsol('sol1',ewfd.Er,setval(M,n))*conj(withsol('sol1',ewfd.Ephi,setval(M,n+1)))+withsol('sol1',ewfd.Er,setval(M,n+1))*conj(withsol('sol1',ewfd.Ephi,setval(M,n))))*nr+(i*withsol('sol1',ewfd.Er,setval(M,n))*conj(withsol('sol1',ewfd.Ez,setval(M,n+1)))-i*withsol('sol1',ewfd.Er,setval(M,n+1))*conj(withsol('sol1',ewfd.Ez,setval(M,n)))+withsol('sol1',ewfd.Ephi,setval(M,n))*conj(withsol('sol1',ewfd.Ez,setval(M,n+1)))+withsol('sol1',ewfd.Ephi,setval(M,n+1))*conj(withsol('sol1',ewfd.Ez,setval(M,n))))*nz,n,M_from,M_to-1)+mu0_const/4*sum((-i*withsol('sol1',ewfd.Hr,setval(M,n))*conj(withsol('sol1',ewfd.Hr,setval(M,n+1)))+i*withsol('sol1',ewfd.Hphi,setval(M,n))*conj(withsol('sol1',ewfd.Hphi,setval(M,n+1)))+i*withsol('sol1',ewfd.Hz,setval(M,n))*conj(withsol('sol1',ewfd.Hz,setval(M,n+1)))+withsol('sol1',ewfd.Hr,setval(M,n))*conj(withsol('sol1',ewfd.Hphi,setval(M,n+1)))+withsol('sol1',ewfd.Hr,setval(M,n+1))*conj(withsol('sol1',ewfd.Hphi,setval(M,n))))*nr+(i*withsol('sol1',ewfd.Hr,setval(M,n))*conj(withsol('sol1',ewfd.Hz,setval(M,n+1)))-i*withsol('sol1',ewfd.Hr,setval(M,n+1))*conj(withsol('sol1',ewfd.Hz,setval(M,n)))+withsol('sol1',ewfd.Hphi,setval(M,n))*conj(withsol('sol1',ewfd.Hz,setval(M,n+1)))+withsol('sol1',ewfd.Hphi,setval(M,n+1))*conj(withsol('sol1',ewfd.Hz,setval(M,n))))*nz,n,M_from,M_to-1))  // Pressure y
    p_z = real(epsilon0_const/4*sum(2*withsol('sol1',ewfd.Er,setval(M,n))*conj(withsol('sol1',ewfd.Ez,setval(M,n)))*nr+(withsol('sol1',ewfd.Ez,setval(M,n))*conj(withsol('sol1',ewfd.Ez,setval(M,n)))-withsol('sol1',ewfd.Er,setval(M,n))*conj(withsol('sol1',ewfd.Er,setval(M,n)))-withsol('sol1',ewfd.Ephi,setval(M,n))*conj(withsol('sol1',ewfd.Ephi,setval(M,n))))*nz,n,M_from,M_to)+mu0_const/4*sum(2*withsol('sol1',ewfd.Hr,setval(M,n))*conj(withsol('sol1',ewfd.Hz,setval(M,n)))*nr+(withsol('sol1',ewfd.Hz,setval(M,n))*conj(withsol('sol1',ewfd.Hz,setval(M,n)))-withsol('sol1',ewfd.Hr,setval(M,n))*conj(withsol('sol1',ewfd.Hr,setval(M,n)))-withsol('sol1',ewfd.Hphi,setval(M,n))*conj(withsol('sol1',ewfd.Hphi,setval(M,n))))*nz,n,M_from,M_to))  // Pressure z

Coordinate systems
  pml1: PML "Perfectly Matched Layer - air" on domains 1, 5 | typicalWavelength = 450[nm]

Geometry
  geom1 "Geometry 1" (2D axisymmetric, length unit µm)
    c1: Circle "Particle" | rot = -90; r = r_p; angle = 180
    c3: Circle "Integration sphere" | rot = -90; r = r_I; angle = 180
    c2: Circle "Air" | rot = -90; layername = PML air; layer = r_pml; r = r_a+r_pml; angle = 180
    fin: Finalize "Form Union"

Materials
  mat1: Common "Air" on all domains
    def "Basic"
      relpermittivity = 1
      relpermeability = 1
      electricconductivity = 0
  mat2: Common "Particle" on domains 4
    def "Basic"
      relpermittivity = -2.5+0.01i
      relpermeability = 1
      electricconductivity = 0

Physics
  ewfd: ElectromagneticWavesFrequencyDomain on all domains
    dependent variable E = {Er, Ephi, Ez}
    MeshControl.ResolveWaveInLossyMedia = 0
    MeshControl.EnableMeshControl = false
    BackgroundField.SolveFor = scatteredField
    BackgroundField.Eb = {exp(-i*ewfd.k0*z)/2*((M==1)+(M==-1)), -i*exp(-i*ewfd.k0*z)/2*((M==1)-(M==-1)), 0}
    outofplanewavenumber.mFloquet = M
    wee1: WaveEquationElectric (default) | DisplacementFieldModel = RelativePermittivity
    axi1: AxialSymmetry (default)
    pec1: PerfectElectricConductor (default)
    init1: init "Initial Values 1" (default)

Mesh
  mesh1 "Mesh 1"
    size: MeshSizeDefault "Size - air" | hmax = wl/7; hmin = wl/15; custom = on
    size1: Size "Size - particle" on domains 4 | hmax = min(wl/19,r_p/11); custom = on
    ftri1: FreeTri "Free Triangular 1" on domains 2-4
    dis1: Distribution on boundaries 1, 8, 9 | numelem = 7
    map1: Map "Mapped 1" on domains 1, 5

Studies
  std1 "Study 1"
    param: Parametric "Parametric Sweep" | pname = M; plistarr = range(M_from,1,M_to)
    freq: Frequency "Frequency Domain" | punit = Hz; plist = c_const/wl

Solver configurations
  sol1 "Solution 1" (study std1)
    v1: Variables "Dependent Variables 1"
    s1: Stationary "Stationary Solver 1" | stol = 0.01
      p1: Parametric | pname = M; plistarr = range(M_from,1,M_to); pcontinuationmode = no
      fc1: FullyCoupled | linsolver = d1
      d1: Direct "Suggested Direct Solver (ewfd)"

Datasets
  dset1: Solution | solution = sol1
  rev1: Revolve2D "Revolution 2D 1" | data = dset1; startangle = -90; revangle = 225

Plots
  pg1: PlotGroup2D "Electric Field (ewfd)" | data = dset1; dataisaxisym = on
    surf1: Surface | expr = ewfd.normE